*HEADING
Cantilever modal benchmark
*NODE
1, 0.0, 0.0, 0.0
2, 4.0, 0.0, 0.0
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*ELEMENT, TYPE=CPS4, ELSET=EALL
1, 1, 5, 73, 72
2, 72, 73, 74, 71
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*MATERIAL, NAME=STEEL
*ELASTIC
210000000000.0, 0.3
*DENSITY
7850.0
*SOLID SECTION, ELSET=EALL, MATERIAL=STEEL
0.1
*BOUNDARY
1, 1, 2, 0.0
4, 1, 2, 0.0
70, 1, 2, 0.0
71, 1, 2, 0.0
72, 1, 2, 0.0
*STEP
*FREQUENCY
5
*END STEP
