*HEADING
Column Seismic THA
*NODE
1, 0.0, 0.0, 0.0
2, 1.0, 0.0, 0.0
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*ELEMENT, TYPE=CPS4, ELSET=EALL
1, 1, 5, 73, 72
2, 72, 73, 74, 71
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*MATERIAL, NAME=CONCRETE
*ELASTIC
30000000000.0, 0.2
*DENSITY
2500.0
*DAMPING, ALPHA=0.749708, BETA=0.001657
*SOLID SECTION, ELSET=EALL, MATERIAL=CONCRETE
1.0
*BOUNDARY
1, 1, 2, 0.0
2, 1, 2, 0.0
5, 1, 2, 0.0
6, 1, 2, 0.0
7, 1, 2, 0.0
*NSET, NSET=NTOPMID
39,
*AMPLITUDE, NAME=EQACCEL
0.000000, 1.384986e-05, 0.010000, 1.370144e-05, 0.020000, 1.371164e-05, 0.030000, 1.358632e-05
0.040000, 1.362758e-05, 0.050000, 1.348084e-05, 0.060000, 1.350777e-05, 0.070000, 1.335431e-05
0.080000, 1.336329e-05, 0.090000, 1.319204e-05, 0.100000, 1.321089e-05, 0.110000, 1.336876e-05
0.120000, 1.291040e-05, 0.130000, 1.290835e-05, 0.140000, 1.296554e-05, 0.150000, 1.292887e-05
0.160000, 1.312229e-05, 0.170000, 1.278066e-05, 0.180000, 1.260035e-05, 0.190000, 1.272885e-05
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55.880000, -1.140251e-04, 55.890000, -1.149305e-04
*STEP, INC=100000
*DYNAMIC, DIRECT, ALPHA=0.0, BETA=0.25, GAMMA=0.5
0.01, 55.9, 0.01, 0.01
*DLOAD, AMPLITUDE=EQACCEL
EALL, GRAV, 9.80665, -1., 0., 0.
*NODE FILE
U
*NODE PRINT, NSET=NTOPMID
U
*END STEP
